<neuroml xmlns="http://www.neuroml.org/schema/neuroml2"  xmlns:xs="http://www.w3.org/2001/XMLSchema" xmlns:xsi="http://www.w3.org/2001/XMLSchema-instance" xsi:schemaLocation="http://www.neuroml.org/schema/neuroml2 https://raw.github.com/NeuroML/NeuroML2/development/Schemas/NeuroML2/NeuroML_v2.3.1.xsd" id="c302_A_EternalPainWithMotors">
    <notes>

Parameters and setting used to generate this network:

    Data reader:                    cect.SpreadsheetDataReader
    c302 version:                   0.10.1
    cect version:                   0.2.5
    owmeta version:                 0.12.3
    owmeta_core version:            0.13.5
    Cells:                          ['ASHL', 'ASHR', 'AWCL', 'AWCR', 'AIBL', 'AIBR', 'RIML', 'RIMR', 'AVAL', 'AVAR', 'VB1', 'VB2', 'VB3', 'VB4', 'VB5', 'VD1', 'VD2', 'VD3', 'VD4', 'VD5', 'DD1', 'DD2', 'DD3', 'DD4', 'DD5', 'DB1', 'DB2', 'DB3', 'DB4', 'DB5']
    Cell stimulated:                []
    Connection:                     []
    Connection numbers overridden:  None
    Connection numbers scaled:      None
    Connection polarities override: None
    Muscles:                        []

    Known BioParameters:
        BioParameter: chem_exc_syn_decay = 10ms (SRC: BlindGuess, certainty 0.1)
        BioParameter: chem_exc_syn_erev = 0mV (SRC: BlindGuess, certainty 0.1)
        BioParameter: chem_exc_syn_rise = 3ms (SRC: BlindGuess, certainty 0.1)
        BioParameter: chem_inh_syn_decay = 10ms (SRC: BlindGuess, certainty 0.1)
        BioParameter: chem_inh_syn_erev = -80mV (SRC: BlindGuess, certainty 0.1)
        BioParameter: chem_inh_syn_rise = 3ms (SRC: BlindGuess, certainty 0.1)
        BioParameter: elec_syn_decay = 10ms (SRC: BlindGuess, certainty 0.1)
        BioParameter: elec_syn_erev = 0mV (SRC: BlindGuess, certainty 0.1)
        BioParameter: elec_syn_rise = 3ms (SRC: BlindGuess, certainty 0.1)
        BioParameter: muscle_iaf_C = 3pF (SRC: BlindGuess, certainty 0.1)
        BioParameter: muscle_iaf_conductance = 0.1nS (SRC: BlindGuess, certainty 0.1)
        BioParameter: muscle_iaf_leak_reversal = -50mV (SRC: BlindGuess, certainty 0.1)
        BioParameter: muscle_iaf_reset = -50mV (SRC: BlindGuess, certainty 0.1)
        BioParameter: muscle_iaf_thresh = -30mV (SRC: BlindGuess, certainty 0.1)
        BioParameter: neuron_iaf_C = 3pF (SRC: BlindGuess, certainty 0.1)
        BioParameter: neuron_iaf_conductance = 0.1nS (SRC: BlindGuess, certainty 0.1)
        BioParameter: neuron_iaf_leak_reversal = -50mV (SRC: BlindGuess, certainty 0.1)
        BioParameter: neuron_iaf_reset = -50mV (SRC: BlindGuess, certainty 0.1)
        BioParameter: neuron_iaf_thresh = -30mV (SRC: BlindGuess, certainty 0.1)
        BioParameter: neuron_to_muscle_chem_exc_syn_gbase = 0.01nS (SRC: BlindGuess, certainty 0.1)
        BioParameter: neuron_to_muscle_chem_inh_syn_gbase = 0.01nS (SRC: BlindGuess, certainty 0.1)
        BioParameter: neuron_to_muscle_elec_syn_gbase = 0nS (SRC: BlindGuess, certainty 0.1)
        BioParameter: neuron_to_neuron_chem_exc_syn_gbase = 0.01nS (SRC: BlindGuess, certainty 0.1)
        BioParameter: neuron_to_neuron_chem_inh_syn_gbase = 0.01nS (SRC: BlindGuess, certainty 0.1)
        BioParameter: neuron_to_neuron_elec_syn_gbase = 0nS (SRC: BlindGuess, certainty 0.1)
        BioParameter: unphysiological_offset_current = 0pA (SRC: KnownError, certainty 0)
        BioParameter: unphysiological_offset_current_del = 0ms (SRC: KnownError, certainty 0)
        BioParameter: unphysiological_offset_current_dur = 200ms (SRC: KnownError, certainty 0)

</notes>
    <expTwoSynapse id="neuron_to_neuron_exc_syn" gbase="0.01nS" erev="0mV" tauDecay="10ms" tauRise="3ms"/>
    <expTwoSynapse id="neuron_to_neuron_elec_syn" gbase="0nS" erev="0mV" tauDecay="10ms" tauRise="3ms"/>
    <expTwoSynapse id="neuron_to_neuron_inh_syn" gbase="0.01nS" erev="-80mV" tauDecay="10ms" tauRise="3ms"/>
    <iafCell id="generic_muscle_iaf_cell" leakReversal="-50mV" thresh="-30mV" reset="-50mV" C="3pF" leakConductance="0.1nS"/>
    <iafCell id="generic_neuron_iaf_cell" leakReversal="-50mV" thresh="-30mV" reset="-50mV" C="3pF" leakConductance="0.1nS"/>
    <pulseGenerator id="offset_current" delay="0ms" duration="200ms" amplitude="0pA"/>
    <pulseGenerator id="stim_ASHL_1" delay="2000ms" duration="8000ms" amplitude="15pA"/>
    <pulseGenerator id="stim_ASHR_1" delay="2000ms" duration="8000ms" amplitude="15pA"/>
    <pulseGenerator id="stim_AWCL_1" delay="2000ms" duration="8000ms" amplitude="10pA"/>
    <pulseGenerator id="stim_AWCR_1" delay="2000ms" duration="8000ms" amplitude="10pA"/>
    <pulseGenerator id="stim_AIBL_1" delay="2000ms" duration="8000ms" amplitude="12pA"/>
    <pulseGenerator id="stim_AIBR_1" delay="2000ms" duration="8000ms" amplitude="12pA"/>
    <pulseGenerator id="stim_RIML_1" delay="2000ms" duration="8000ms" amplitude="10pA"/>
    <pulseGenerator id="stim_RIMR_1" delay="2000ms" duration="8000ms" amplitude="10pA"/>
    <pulseGenerator id="stim_AVAL_1" delay="2000ms" duration="8000ms" amplitude="8pA"/>
    <pulseGenerator id="stim_AVAR_1" delay="2000ms" duration="8000ms" amplitude="8pA"/>
    <network id="c302_A_EternalPainWithMotors">
        <property tag="recommended_duration_ms" value="10000"/>
        <property tag="recommended_dt_ms" value="0.05"/>
        <population id="AIBL" component="generic_neuron_iaf_cell" size="1" type="populationList">
            <property tag="type" value="interneuron"/>
            <property tag="receptor" value="GGR-1; GLR-1; GLR-2; GLR-5; MGL-2; MOD-1; SER-4"/>
            <property tag="neurotransmitter" value="Glutamate"/>
            <instance id="0">
                <location x="2.7" y="-266.199979999999982" z="37.0"/>
            </instance>
        </population>
        <population id="AIBR" component="generic_neuron_iaf_cell" size="1" type="populationList">
            <property tag="type" value="interneuron"/>
            <property tag="receptor" value="GGR-1; GLR-1; GLR-2; GLR-5; MGL-2; MOD-1; SER-1; SER-4"/>
            <property tag="neurotransmitter" value=""/>
            <instance id="0">
                <location x="-6.8999996" y="-266.199979999999982" z="37.0"/>
            </instance>
        </population>
        <population id="ASHL" component="generic_neuron_iaf_cell" size="1" type="populationList">
            <property tag="type" value="sensory"/>
            <property tag="receptor" value="DCAR-1; DOP-4; NPR-1; NPR-2; NTR-1; NTR-2; OCR-2; OCTR-1; OSM-9; SER-3; SER-5; SRA-6; SRB-6; TMC-1; TRPA-1; TYRA-2; UNC-8"/>
            <property tag="neurotransmitter" value="Glutamate"/>
            <instance id="0">
                <location x="5.55" y="-265.625" z="41.0"/>
            </instance>
        </population>
        <population id="ASHR" component="generic_neuron_iaf_cell" size="1" type="populationList">
            <property tag="type" value="sensory"/>
            <property tag="receptor" value="DCAR-1; DOP-4; NPR-1; NPR-2; NTR-1; NTR-2; OCR-2; OCTR-1; OSM-9; SER-3; SER-5; SRA-6; SRB-6; TMC-1; TRPA-1; TYRA-2; UNC-8"/>
            <property tag="neurotransmitter" value="Glutamate"/>
            <instance id="0">
                <location x="-9.800000000000001" y="-265.625" z="41.0"/>
            </instance>
        </population>
        <population id="AVAL" component="generic_neuron_iaf_cell" size="1" type="populationList">
            <property tag="type" value="interneuron"/>
            <property tag="receptor" value="GGR-3; GLR-1; GLR-2; GLR-4; GLR-5; NMR-1; NMR-2; NPR-4; UNC-8"/>
            <property tag="neurotransmitter" value=""/>
            <property tag="OpenWormBackerAssignedName" value="JUD"/>
            <instance id="0">
                <location x="-0.55" y="-271.5" z="37.982999999999997"/>
            </instance>
        </population>
        <population id="AVAR" component="generic_neuron_iaf_cell" size="1" type="populationList">
            <property tag="type" value="interneuron"/>
            <property tag="receptor" value="GGR-3; GLR-1; GLR-2; GLR-4; GLR-5; NMR-1; NMR-2; NPR-4; UNC-8"/>
            <property tag="neurotransmitter" value=""/>
            <instance id="0">
                <location x="-3.5" y="-271.5" z="37.982999999999997"/>
            </instance>
        </population>
        <population id="AWCL" component="generic_neuron_iaf_cell" size="1" type="populationList">
            <property tag="type" value="sensory"/>
            <property tag="receptor" value="DAF-11; OSM-9; STR-2; TYRA-3"/>
            <property tag="neurotransmitter" value="Glutamate"/>
            <instance id="0">
                <location x="3.8" y="-267.949999999999989" z="38.950000000000003"/>
            </instance>
        </population>
        <population id="AWCR" component="generic_neuron_iaf_cell" size="1" type="populationList">
            <property tag="type" value="sensory"/>
            <property tag="receptor" value="DAF-11; OSM-9; STR-2; TYRA-3"/>
            <property tag="neurotransmitter" value="Glutamate"/>
            <instance id="0">
                <location x="-8.1" y="-267.949999999999989" z="38.950000000000003"/>
            </instance>
        </population>
        <population id="DB1" component="generic_neuron_iaf_cell" size="1" type="populationList">
            <property tag="type" value="motor"/>
            <property tag="receptor" value="CKR-2; DOP-1; DOP-3; NPR-3"/>
            <property tag="neurotransmitter" value="Acetylcholine"/>
            <instance id="0">
                <location x="-1.9" y="-230.349989999999991" z="6.85"/>
            </instance>
        </population>
        <population id="DB2" component="generic_neuron_iaf_cell" size="1" type="populationList">
            <property tag="type" value="motor"/>
            <property tag="receptor" value="CKR-2; DOP-1; DOP-3; NPR-3; PDFR-1"/>
            <property tag="neurotransmitter" value="Acetylcholine"/>
            <instance id="0">
                <location x="-0.2" y="-244.5" z="15.787000000000001"/>
            </instance>
        </population>
        <population id="DB3" component="generic_neuron_iaf_cell" size="1" type="populationList">
            <property tag="type" value="motor"/>
            <property tag="receptor" value="CKR-2; DOP-1; DOP-3; NPR-3"/>
            <property tag="neurotransmitter" value="Acetylcholine"/>
            <instance id="0">
                <location x="-1.85" y="-195.275000000000006" z="-18.524999999999999"/>
            </instance>
        </population>
        <population id="DB4" component="generic_neuron_iaf_cell" size="1" type="populationList">
            <property tag="type" value="motor"/>
            <property tag="receptor" value="CKR-2; DOP-1; DOP-3; NPR-3"/>
            <property tag="neurotransmitter" value="Acetylcholine"/>
            <instance id="0">
                <location x="-1.8750001" y="-96.275000000000006" z="-64.650000000000006"/>
            </instance>
        </population>
        <population id="DB5" component="generic_neuron_iaf_cell" size="1" type="populationList">
            <property tag="type" value="motor"/>
            <property tag="receptor" value="CKR-2; DOP-1; DOP-3; NPR-3"/>
            <property tag="neurotransmitter" value="Acetylcholine"/>
            <instance id="0">
                <location x="-4.05" y="35.25" z="-30.449999999999999"/>
            </instance>
        </population>
        <population id="DD1" component="generic_neuron_iaf_cell" size="1" type="populationList">
            <property tag="type" value="motor"/>
            <property tag="receptor" value="DOP-3; MOD-1; NPR-1"/>
            <property tag="neurotransmitter" value="GABA"/>
            <property tag="OpenWormBackerAssignedName" value="Stanislav Petrov"/>
            <instance id="0">
                <location x="-0.9" y="-231.949999999999989" z="6.85"/>
            </instance>
        </population>
        <population id="DD2" component="generic_neuron_iaf_cell" size="1" type="populationList">
            <property tag="type" value="motor"/>
            <property tag="receptor" value="DOP-3; MOD-1; NPR-1"/>
            <property tag="neurotransmitter" value="GABA"/>
            <property tag="OpenWormBackerAssignedName" value="Evolver"/>
            <instance id="0">
                <location x="-1.85" y="-156.474989999999991" z="-42.850000000000001"/>
            </instance>
        </population>
        <population id="DD3" component="generic_neuron_iaf_cell" size="1" type="populationList">
            <property tag="type" value="motor"/>
            <property tag="receptor" value="DOP-3; MOD-1; NPR-1"/>
            <property tag="neurotransmitter" value="GABA"/>
            <instance id="0">
                <location x="-1.9" y="-28.600002" z="-60.524999999999999"/>
            </instance>
        </population>
        <population id="DD4" component="generic_neuron_iaf_cell" size="1" type="populationList">
            <property tag="type" value="motor"/>
            <property tag="receptor" value="DOP-3; MOD-1; NPR-1"/>
            <property tag="neurotransmitter" value="GABA"/>
            <instance id="0">
                <location x="-1.8750001" y="122.899994000000007" z="4.5499997"/>
            </instance>
        </population>
        <population id="DD5" component="generic_neuron_iaf_cell" size="1" type="populationList">
            <property tag="type" value="motor"/>
            <property tag="receptor" value="DOP-3; MOD-1; NPR-1"/>
            <property tag="neurotransmitter" value="GABA"/>
            <instance id="0">
                <location x="-1.8750001" y="234.050019999999989" z="-15.775"/>
            </instance>
        </population>
        <population id="RIML" component="generic_neuron_iaf_cell" size="1" type="populationList">
            <property tag="type" value="interneuron; motor"/>
            <property tag="receptor" value="DOP-1; MOD-1; SER-4"/>
            <property tag="neurotransmitter" value="Acetylcholine; Glutamate; Tyramine"/>
            <instance id="0">
                <location x="3.5" y="-260.899999999999977" z="39.0"/>
            </instance>
        </population>
        <population id="RIMR" component="generic_neuron_iaf_cell" size="1" type="populationList">
            <property tag="type" value="interneuron; motor"/>
            <property tag="receptor" value="DOP-1; MOD-1; SER-4"/>
            <property tag="neurotransmitter" value="Acetylcholine; Glutamate; Tyramine"/>
            <instance id="0">
                <location x="-7.75" y="-260.899999999999977" z="39.0"/>
            </instance>
        </population>
        <population id="VB1" component="generic_neuron_iaf_cell" size="1" type="populationList">
            <property tag="type" value="motor; sensory"/>
            <property tag="receptor" value="CKR-2; DOP-1; DOP-3; NPR-3"/>
            <property tag="neurotransmitter" value="Acetylcholine"/>
            <property tag="OpenWormBackerAssignedName" value="NoTex.ch"/>
            <instance id="0">
                <location x="-1.55" y="-246.449999999999989" z="16.399999999999999"/>
            </instance>
        </population>
        <population id="VB2" component="generic_neuron_iaf_cell" size="1" type="populationList">
            <property tag="type" value="motor; sensory"/>
            <property tag="receptor" value="CKR-2; DOP-1; DOP-3; NPR-3"/>
            <property tag="neurotransmitter" value="Acetylcholine"/>
            <property tag="OpenWormBackerAssignedName" value="Bloodgood"/>
            <instance id="0">
                <location x="-2.0" y="-253.300000000000011" z="19.850000000000001"/>
            </instance>
        </population>
        <population id="VB3" component="generic_neuron_iaf_cell" size="1" type="populationList">
            <property tag="type" value="motor; sensory"/>
            <property tag="receptor" value="CKR-2; DOP-1; DOP-3; NPR-3"/>
            <property tag="neurotransmitter" value="Acetylcholine"/>
            <property tag="OpenWormBackerAssignedName" value="Ramez Naam"/>
            <instance id="0">
                <location x="-1.85" y="-210.224999999999994" z="-8.725"/>
            </instance>
        </population>
        <population id="VB4" component="generic_neuron_iaf_cell" size="1" type="populationList">
            <property tag="type" value="motor; sensory"/>
            <property tag="receptor" value="CKR-2; DOP-1; DOP-3; NPR-3"/>
            <property tag="neurotransmitter" value="Acetylcholine"/>
            <property tag="OpenWormBackerAssignedName" value="Worm"/>
            <instance id="0">
                <location x="-2.0" y="-173.25" z="-33.5"/>
            </instance>
        </population>
        <population id="VB5" component="generic_neuron_iaf_cell" size="1" type="populationList">
            <property tag="type" value="motor; sensory"/>
            <property tag="receptor" value="CKR-2; DOP-1; DOP-3; NPR-3"/>
            <property tag="neurotransmitter" value="Acetylcholine"/>
            <instance id="0">
                <location x="-1.85" y="-109.549999999999997" z="-62.149999999999999"/>
            </instance>
        </population>
        <population id="VD1" component="generic_neuron_iaf_cell" size="1" type="populationList">
            <property tag="type" value="motor"/>
            <property tag="receptor" value="DOP-3; MOD-1; NPR-1; SER-2"/>
            <property tag="neurotransmitter" value="GABA"/>
            <property tag="OpenWormBackerAssignedName" value="Ackley Lab"/>
            <instance id="0">
                <location x="-0.70000005" y="-228.599999999999994" z="4.05"/>
            </instance>
        </population>
        <population id="VD2" component="generic_neuron_iaf_cell" size="1" type="populationList">
            <property tag="type" value="motor"/>
            <property tag="receptor" value="DOP-3; MOD-1; NPR-1; SER-2"/>
            <property tag="neurotransmitter" value="GABA"/>
            <instance id="0">
                <location x="-0.65000004" y="-226.049990000000008" z="2.35"/>
            </instance>
        </population>
        <population id="VD3" component="generic_neuron_iaf_cell" size="1" type="populationList">
            <property tag="type" value="motor"/>
            <property tag="receptor" value="DOP-3; MOD-1; NPR-1; SER-2"/>
            <property tag="neurotransmitter" value="GABA"/>
            <instance id="0">
                <location x="-0.8" y="-188.099999999999994" z="-23.449999999999999"/>
            </instance>
        </population>
        <population id="VD4" component="generic_neuron_iaf_cell" size="1" type="populationList">
            <property tag="type" value="motor"/>
            <property tag="receptor" value="DOP-3; MOD-1; NPR-1; SER-2"/>
            <property tag="neurotransmitter" value="GABA"/>
            <instance id="0">
                <location x="-0.8" y="-137.199999999999989" z="-52.700000000000003"/>
            </instance>
        </population>
        <population id="VD5" component="generic_neuron_iaf_cell" size="1" type="populationList">
            <property tag="type" value="motor"/>
            <property tag="receptor" value="DOP-3; MOD-1; NPR-1; SER-2"/>
            <property tag="neurotransmitter" value="GABA"/>
            <instance id="0">
                <location x="-0.75" y="-68.299999999999997" z="-66.75"/>
            </instance>
        </population>
        <projection id="NC_AIBL_AVAL_Glutamate" presynapticPopulation="AIBL" postsynapticPopulation="AVAL" synapse="neuron_to_neuron_exc_syn">
            <connectionWD id="0" preCellId="../AIBL/0/generic_neuron_iaf_cell" postCellId="../AVAL/0/generic_neuron_iaf_cell" weight="2.0" delay="0ms"/>
        </projection>
        <projection id="NC_AIBL_RIML_Glutamate" presynapticPopulation="AIBL" postsynapticPopulation="RIML" synapse="neuron_to_neuron_exc_syn">
            <connectionWD id="0" preCellId="../AIBL/0/generic_neuron_iaf_cell" postCellId="../RIML/0/generic_neuron_iaf_cell" weight="2.0" delay="0ms"/>
        </projection>
        <projection id="NC_AIBL_RIMR_Generic_GJ" presynapticPopulation="AIBL" postsynapticPopulation="RIMR" synapse="neuron_to_neuron_elec_syn">
            <connectionWD id="0" preCellId="../AIBL/0/generic_neuron_iaf_cell" postCellId="../RIMR/0/generic_neuron_iaf_cell" weight="1.0" delay="0ms"/>
        </projection>
        <projection id="NC_AIBL_RIMR_Glutamate" presynapticPopulation="AIBL" postsynapticPopulation="RIMR" synapse="neuron_to_neuron_exc_syn">
            <connectionWD id="0" preCellId="../AIBL/0/generic_neuron_iaf_cell" postCellId="../RIMR/0/generic_neuron_iaf_cell" weight="13.0" delay="0ms"/>
        </projection>
        <projection id="NC_AIBR_AVAR_Glutamate" presynapticPopulation="AIBR" postsynapticPopulation="AVAR" synapse="neuron_to_neuron_exc_syn">
            <connectionWD id="0" preCellId="../AIBR/0/generic_neuron_iaf_cell" postCellId="../AVAR/0/generic_neuron_iaf_cell" weight="1.0" delay="0ms"/>
        </projection>
        <projection id="NC_AIBR_DB1_Generic_GJ" presynapticPopulation="AIBR" postsynapticPopulation="DB1" synapse="neuron_to_neuron_elec_syn">
            <connectionWD id="0" preCellId="../AIBR/0/generic_neuron_iaf_cell" postCellId="../DB1/0/generic_neuron_iaf_cell" weight="1.0" delay="0ms"/>
        </projection>
        <projection id="NC_AIBR_RIML_Generic_GJ" presynapticPopulation="AIBR" postsynapticPopulation="RIML" synapse="neuron_to_neuron_elec_syn">
            <connectionWD id="0" preCellId="../AIBR/0/generic_neuron_iaf_cell" postCellId="../RIML/0/generic_neuron_iaf_cell" weight="1.0" delay="0ms"/>
        </projection>
        <projection id="NC_AIBR_RIML_Glutamate" presynapticPopulation="AIBR" postsynapticPopulation="RIML" synapse="neuron_to_neuron_exc_syn">
            <connectionWD id="0" preCellId="../AIBR/0/generic_neuron_iaf_cell" postCellId="../RIML/0/generic_neuron_iaf_cell" weight="16.0" delay="0ms"/>
        </projection>
        <projection id="NC_AIBR_RIMR_Glutamate" presynapticPopulation="AIBR" postsynapticPopulation="RIMR" synapse="neuron_to_neuron_exc_syn">
            <connectionWD id="0" preCellId="../AIBR/0/generic_neuron_iaf_cell" postCellId="../RIMR/0/generic_neuron_iaf_cell" weight="1.0" delay="0ms"/>
        </projection>
        <projection id="NC_AIBR_VB1_Glutamate" presynapticPopulation="AIBR" postsynapticPopulation="VB1" synapse="neuron_to_neuron_exc_syn">
            <connectionWD id="0" preCellId="../AIBR/0/generic_neuron_iaf_cell" postCellId="../VB1/0/generic_neuron_iaf_cell" weight="3.0" delay="0ms"/>
        </projection>
        <projection id="NC_ASHL_AIBL_Glutamate" presynapticPopulation="ASHL" postsynapticPopulation="AIBL" synapse="neuron_to_neuron_exc_syn">
            <connectionWD id="0" preCellId="../ASHL/0/generic_neuron_iaf_cell" postCellId="../AIBL/0/generic_neuron_iaf_cell" weight="5.0" delay="0ms"/>
        </projection>
        <projection id="NC_ASHL_ASHR_Generic_GJ" presynapticPopulation="ASHL" postsynapticPopulation="ASHR" synapse="neuron_to_neuron_elec_syn">
            <connectionWD id="0" preCellId="../ASHL/0/generic_neuron_iaf_cell" postCellId="../ASHR/0/generic_neuron_iaf_cell" weight="1.0" delay="0ms"/>
        </projection>
        <projection id="NC_ASHL_AVAL_Glutamate" presynapticPopulation="ASHL" postsynapticPopulation="AVAL" synapse="neuron_to_neuron_exc_syn">
            <connectionWD id="0" preCellId="../ASHL/0/generic_neuron_iaf_cell" postCellId="../AVAL/0/generic_neuron_iaf_cell" weight="2.0" delay="0ms"/>
        </projection>
        <projection id="NC_ASHL_RIML_Glutamate" presynapticPopulation="ASHL" postsynapticPopulation="RIML" synapse="neuron_to_neuron_exc_syn">
            <connectionWD id="0" preCellId="../ASHL/0/generic_neuron_iaf_cell" postCellId="../RIML/0/generic_neuron_iaf_cell" weight="1.0" delay="0ms"/>
        </projection>
        <projection id="NC_ASHR_AIBR_Glutamate" presynapticPopulation="ASHR" postsynapticPopulation="AIBR" synapse="neuron_to_neuron_exc_syn">
            <connectionWD id="0" preCellId="../ASHR/0/generic_neuron_iaf_cell" postCellId="../AIBR/0/generic_neuron_iaf_cell" weight="3.0" delay="0ms"/>
        </projection>
        <projection id="NC_ASHR_ASHL_Generic_GJ" presynapticPopulation="ASHR" postsynapticPopulation="ASHL" synapse="neuron_to_neuron_elec_syn">
            <connectionWD id="0" preCellId="../ASHR/0/generic_neuron_iaf_cell" postCellId="../ASHL/0/generic_neuron_iaf_cell" weight="1.0" delay="0ms"/>
        </projection>
        <projection id="NC_ASHR_AVAR_Glutamate" presynapticPopulation="ASHR" postsynapticPopulation="AVAR" synapse="neuron_to_neuron_exc_syn">
            <connectionWD id="0" preCellId="../ASHR/0/generic_neuron_iaf_cell" postCellId="../AVAR/0/generic_neuron_iaf_cell" weight="5.0" delay="0ms"/>
        </projection>
        <projection id="NC_AVAL_AVAR_FMRFamide" presynapticPopulation="AVAL" postsynapticPopulation="AVAR" synapse="neuron_to_neuron_exc_syn">
            <connectionWD id="0" preCellId="../AVAL/0/generic_neuron_iaf_cell" postCellId="../AVAR/0/generic_neuron_iaf_cell" weight="2.0" delay="0ms"/>
        </projection>
        <projection id="NC_AVAL_AVAR_Generic_GJ" presynapticPopulation="AVAL" postsynapticPopulation="AVAR" synapse="neuron_to_neuron_elec_syn">
            <connectionWD id="0" preCellId="../AVAL/0/generic_neuron_iaf_cell" postCellId="../AVAR/0/generic_neuron_iaf_cell" weight="5.0" delay="0ms"/>
        </projection>
        <projection id="NC_AVAL_DB5_FMRFamide" presynapticPopulation="AVAL" postsynapticPopulation="DB5" synapse="neuron_to_neuron_exc_syn">
            <connectionWD id="0" preCellId="../AVAL/0/generic_neuron_iaf_cell" postCellId="../DB5/0/generic_neuron_iaf_cell" weight="2.0" delay="0ms"/>
        </projection>
        <projection id="NC_AVAL_RIMR_Generic_GJ" presynapticPopulation="AVAL" postsynapticPopulation="RIMR" synapse="neuron_to_neuron_elec_syn">
            <connectionWD id="0" preCellId="../AVAL/0/generic_neuron_iaf_cell" postCellId="../RIMR/0/generic_neuron_iaf_cell" weight="3.0" delay="0ms"/>
        </projection>
        <projection id="NC_AVAR_AVAL_FMRFamide" presynapticPopulation="AVAR" postsynapticPopulation="AVAL" synapse="neuron_to_neuron_exc_syn">
            <connectionWD id="0" preCellId="../AVAR/0/generic_neuron_iaf_cell" postCellId="../AVAL/0/generic_neuron_iaf_cell" weight="1.0" delay="0ms"/>
        </projection>
        <projection id="NC_AVAR_AVAL_Generic_GJ" presynapticPopulation="AVAR" postsynapticPopulation="AVAL" synapse="neuron_to_neuron_elec_syn">
            <connectionWD id="0" preCellId="../AVAR/0/generic_neuron_iaf_cell" postCellId="../AVAL/0/generic_neuron_iaf_cell" weight="5.0" delay="0ms"/>
        </projection>
        <projection id="NC_AVAR_DB3_FMRFamide" presynapticPopulation="AVAR" postsynapticPopulation="DB3" synapse="neuron_to_neuron_exc_syn">
            <connectionWD id="0" preCellId="../AVAR/0/generic_neuron_iaf_cell" postCellId="../DB3/0/generic_neuron_iaf_cell" weight="1.0" delay="0ms"/>
        </projection>
        <projection id="NC_AVAR_DB5_FMRFamide" presynapticPopulation="AVAR" postsynapticPopulation="DB5" synapse="neuron_to_neuron_exc_syn">
            <connectionWD id="0" preCellId="../AVAR/0/generic_neuron_iaf_cell" postCellId="../DB5/0/generic_neuron_iaf_cell" weight="1.0" delay="0ms"/>
        </projection>
        <projection id="NC_AVAR_DB5_Generic_GJ" presynapticPopulation="AVAR" postsynapticPopulation="DB5" synapse="neuron_to_neuron_elec_syn">
            <connectionWD id="0" preCellId="../AVAR/0/generic_neuron_iaf_cell" postCellId="../DB5/0/generic_neuron_iaf_cell" weight="2.0" delay="0ms"/>
        </projection>
        <projection id="NC_AVAR_RIML_Generic_GJ" presynapticPopulation="AVAR" postsynapticPopulation="RIML" synapse="neuron_to_neuron_elec_syn">
            <connectionWD id="0" preCellId="../AVAR/0/generic_neuron_iaf_cell" postCellId="../RIML/0/generic_neuron_iaf_cell" weight="2.0" delay="0ms"/>
        </projection>
        <projection id="NC_AVAR_RIMR_Generic_GJ" presynapticPopulation="AVAR" postsynapticPopulation="RIMR" synapse="neuron_to_neuron_elec_syn">
            <connectionWD id="0" preCellId="../AVAR/0/generic_neuron_iaf_cell" postCellId="../RIMR/0/generic_neuron_iaf_cell" weight="1.0" delay="0ms"/>
        </projection>
        <projection id="NC_AWCL_AIBL_Glutamate" presynapticPopulation="AWCL" postsynapticPopulation="AIBL" synapse="neuron_to_neuron_exc_syn">
            <connectionWD id="0" preCellId="../AWCL/0/generic_neuron_iaf_cell" postCellId="../AIBL/0/generic_neuron_iaf_cell" weight="1.0" delay="0ms"/>
        </projection>
        <projection id="NC_AWCL_AIBR_Glutamate" presynapticPopulation="AWCL" postsynapticPopulation="AIBR" synapse="neuron_to_neuron_exc_syn">
            <connectionWD id="0" preCellId="../AWCL/0/generic_neuron_iaf_cell" postCellId="../AIBR/0/generic_neuron_iaf_cell" weight="1.0" delay="0ms"/>
        </projection>
        <projection id="NC_AWCL_AVAL_Glutamate" presynapticPopulation="AWCL" postsynapticPopulation="AVAL" synapse="neuron_to_neuron_exc_syn">
            <connectionWD id="0" preCellId="../AWCL/0/generic_neuron_iaf_cell" postCellId="../AVAL/0/generic_neuron_iaf_cell" weight="1.0" delay="0ms"/>
        </projection>
        <projection id="NC_AWCL_AWCR_Glutamate" presynapticPopulation="AWCL" postsynapticPopulation="AWCR" synapse="neuron_to_neuron_exc_syn">
            <connectionWD id="0" preCellId="../AWCL/0/generic_neuron_iaf_cell" postCellId="../AWCR/0/generic_neuron_iaf_cell" weight="1.0" delay="0ms"/>
        </projection>
        <projection id="NC_AWCR_AIBR_Glutamate" presynapticPopulation="AWCR" postsynapticPopulation="AIBR" synapse="neuron_to_neuron_exc_syn">
            <connectionWD id="0" preCellId="../AWCR/0/generic_neuron_iaf_cell" postCellId="../AIBR/0/generic_neuron_iaf_cell" weight="4.0" delay="0ms"/>
        </projection>
        <projection id="NC_AWCR_AWCL_Glutamate" presynapticPopulation="AWCR" postsynapticPopulation="AWCL" synapse="neuron_to_neuron_exc_syn">
            <connectionWD id="0" preCellId="../AWCR/0/generic_neuron_iaf_cell" postCellId="../AWCL/0/generic_neuron_iaf_cell" weight="5.0" delay="0ms"/>
        </projection>
        <projection id="NC_DB1_AIBR_Generic_GJ" presynapticPopulation="DB1" postsynapticPopulation="AIBR" synapse="neuron_to_neuron_elec_syn">
            <connectionWD id="0" preCellId="../DB1/0/generic_neuron_iaf_cell" postCellId="../AIBR/0/generic_neuron_iaf_cell" weight="1.0" delay="0ms"/>
        </projection>
        <projection id="NC_DB1_DB2_Generic_GJ" presynapticPopulation="DB1" postsynapticPopulation="DB2" synapse="neuron_to_neuron_elec_syn">
            <connectionWD id="0" preCellId="../DB1/0/generic_neuron_iaf_cell" postCellId="../DB2/0/generic_neuron_iaf_cell" weight="1.0" delay="0ms"/>
        </projection>
        <projection id="NC_DB1_DB4_Generic_GJ" presynapticPopulation="DB1" postsynapticPopulation="DB4" synapse="neuron_to_neuron_elec_syn">
            <connectionWD id="0" preCellId="../DB1/0/generic_neuron_iaf_cell" postCellId="../DB4/0/generic_neuron_iaf_cell" weight="1.0" delay="0ms"/>
        </projection>
        <projection id="NC_DB1_DD1_Acetylcholine" presynapticPopulation="DB1" postsynapticPopulation="DD1" synapse="neuron_to_neuron_exc_syn">
            <connectionWD id="0" preCellId="../DB1/0/generic_neuron_iaf_cell" postCellId="../DD1/0/generic_neuron_iaf_cell" weight="10.0" delay="0ms"/>
        </projection>
        <projection id="NC_DB1_VB3_Generic_GJ" presynapticPopulation="DB1" postsynapticPopulation="VB3" synapse="neuron_to_neuron_elec_syn">
            <connectionWD id="0" preCellId="../DB1/0/generic_neuron_iaf_cell" postCellId="../VB3/0/generic_neuron_iaf_cell" weight="1.0" delay="0ms"/>
        </projection>
        <projection id="NC_DB1_VB4_Generic_GJ" presynapticPopulation="DB1" postsynapticPopulation="VB4" synapse="neuron_to_neuron_elec_syn">
            <connectionWD id="0" preCellId="../DB1/0/generic_neuron_iaf_cell" postCellId="../VB4/0/generic_neuron_iaf_cell" weight="1.0" delay="0ms"/>
        </projection>
        <projection id="NC_DB1_VD1_Acetylcholine" presynapticPopulation="DB1" postsynapticPopulation="VD1" synapse="neuron_to_neuron_exc_syn">
            <connectionWD id="0" preCellId="../DB1/0/generic_neuron_iaf_cell" postCellId="../VD1/0/generic_neuron_iaf_cell" weight="21.0" delay="0ms"/>
        </projection>
        <projection id="NC_DB1_VD2_Acetylcholine" presynapticPopulation="DB1" postsynapticPopulation="VD2" synapse="neuron_to_neuron_exc_syn">
            <connectionWD id="0" preCellId="../DB1/0/generic_neuron_iaf_cell" postCellId="../VD2/0/generic_neuron_iaf_cell" weight="15.0" delay="0ms"/>
        </projection>
        <projection id="NC_DB1_VD3_Acetylcholine" presynapticPopulation="DB1" postsynapticPopulation="VD3" synapse="neuron_to_neuron_exc_syn">
            <connectionWD id="0" preCellId="../DB1/0/generic_neuron_iaf_cell" postCellId="../VD3/0/generic_neuron_iaf_cell" weight="1.0" delay="0ms"/>
        </projection>
        <projection id="NC_DB2_DB1_Generic_GJ" presynapticPopulation="DB2" postsynapticPopulation="DB1" synapse="neuron_to_neuron_elec_syn">
            <connectionWD id="0" preCellId="../DB2/0/generic_neuron_iaf_cell" postCellId="../DB1/0/generic_neuron_iaf_cell" weight="1.0" delay="0ms"/>
        </projection>
        <projection id="NC_DB2_DB3_Generic_GJ" presynapticPopulation="DB2" postsynapticPopulation="DB3" synapse="neuron_to_neuron_elec_syn">
            <connectionWD id="0" preCellId="../DB2/0/generic_neuron_iaf_cell" postCellId="../DB3/0/generic_neuron_iaf_cell" weight="6.0" delay="0ms"/>
        </projection>
        <projection id="NC_DB2_DD2_Acetylcholine" presynapticPopulation="DB2" postsynapticPopulation="DD2" synapse="neuron_to_neuron_exc_syn">
            <connectionWD id="0" preCellId="../DB2/0/generic_neuron_iaf_cell" postCellId="../DD2/0/generic_neuron_iaf_cell" weight="2.0" delay="0ms"/>
        </projection>
        <projection id="NC_DB2_VB1_Generic_GJ" presynapticPopulation="DB2" postsynapticPopulation="VB1" synapse="neuron_to_neuron_elec_syn">
            <connectionWD id="0" preCellId="../DB2/0/generic_neuron_iaf_cell" postCellId="../VB1/0/generic_neuron_iaf_cell" weight="2.0" delay="0ms"/>
        </projection>
        <projection id="NC_DB2_VD3_Acetylcholine" presynapticPopulation="DB2" postsynapticPopulation="VD3" synapse="neuron_to_neuron_exc_syn">
            <connectionWD id="0" preCellId="../DB2/0/generic_neuron_iaf_cell" postCellId="../VD3/0/generic_neuron_iaf_cell" weight="23.0" delay="0ms"/>
        </projection>
        <projection id="NC_DB2_VD4_Acetylcholine" presynapticPopulation="DB2" postsynapticPopulation="VD4" synapse="neuron_to_neuron_exc_syn">
            <connectionWD id="0" preCellId="../DB2/0/generic_neuron_iaf_cell" postCellId="../VD4/0/generic_neuron_iaf_cell" weight="14.0" delay="0ms"/>
        </projection>
        <projection id="NC_DB2_VD5_Acetylcholine" presynapticPopulation="DB2" postsynapticPopulation="VD5" synapse="neuron_to_neuron_exc_syn">
            <connectionWD id="0" preCellId="../DB2/0/generic_neuron_iaf_cell" postCellId="../VD5/0/generic_neuron_iaf_cell" weight="1.0" delay="0ms"/>
        </projection>
        <projection id="NC_DB3_DB2_Generic_GJ" presynapticPopulation="DB3" postsynapticPopulation="DB2" synapse="neuron_to_neuron_elec_syn">
            <connectionWD id="0" preCellId="../DB3/0/generic_neuron_iaf_cell" postCellId="../DB2/0/generic_neuron_iaf_cell" weight="6.0" delay="0ms"/>
        </projection>
        <projection id="NC_DB3_DB4_Generic_GJ" presynapticPopulation="DB3" postsynapticPopulation="DB4" synapse="neuron_to_neuron_elec_syn">
            <connectionWD id="0" preCellId="../DB3/0/generic_neuron_iaf_cell" postCellId="../DB4/0/generic_neuron_iaf_cell" weight="1.0" delay="0ms"/>
        </projection>
        <projection id="NC_DB3_DD2_Acetylcholine" presynapticPopulation="DB3" postsynapticPopulation="DD2" synapse="neuron_to_neuron_exc_syn">
            <connectionWD id="0" preCellId="../DB3/0/generic_neuron_iaf_cell" postCellId="../DD2/0/generic_neuron_iaf_cell" weight="4.0" delay="0ms"/>
        </projection>
        <projection id="NC_DB3_DD3_Acetylcholine" presynapticPopulation="DB3" postsynapticPopulation="DD3" synapse="neuron_to_neuron_exc_syn">
            <connectionWD id="0" preCellId="../DB3/0/generic_neuron_iaf_cell" postCellId="../DD3/0/generic_neuron_iaf_cell" weight="10.0" delay="0ms"/>
        </projection>
        <projection id="NC_DB3_VD4_Acetylcholine" presynapticPopulation="DB3" postsynapticPopulation="VD4" synapse="neuron_to_neuron_exc_syn">
            <connectionWD id="0" preCellId="../DB3/0/generic_neuron_iaf_cell" postCellId="../VD4/0/generic_neuron_iaf_cell" weight="9.0" delay="0ms"/>
        </projection>
        <projection id="NC_DB3_VD5_Acetylcholine" presynapticPopulation="DB3" postsynapticPopulation="VD5" synapse="neuron_to_neuron_exc_syn">
            <connectionWD id="0" preCellId="../DB3/0/generic_neuron_iaf_cell" postCellId="../VD5/0/generic_neuron_iaf_cell" weight="26.0" delay="0ms"/>
        </projection>
        <projection id="NC_DB4_DB1_Generic_GJ" presynapticPopulation="DB4" postsynapticPopulation="DB1" synapse="neuron_to_neuron_elec_syn">
            <connectionWD id="0" preCellId="../DB4/0/generic_neuron_iaf_cell" postCellId="../DB1/0/generic_neuron_iaf_cell" weight="1.0" delay="0ms"/>
        </projection>
        <projection id="NC_DB4_DB3_Generic_GJ" presynapticPopulation="DB4" postsynapticPopulation="DB3" synapse="neuron_to_neuron_elec_syn">
            <connectionWD id="0" preCellId="../DB4/0/generic_neuron_iaf_cell" postCellId="../DB3/0/generic_neuron_iaf_cell" weight="1.0" delay="0ms"/>
        </projection>
        <projection id="NC_DB4_DD3_Acetylcholine" presynapticPopulation="DB4" postsynapticPopulation="DD3" synapse="neuron_to_neuron_exc_syn">
            <connectionWD id="0" preCellId="../DB4/0/generic_neuron_iaf_cell" postCellId="../DD3/0/generic_neuron_iaf_cell" weight="3.0" delay="0ms"/>
        </projection>
        <projection id="NC_DB4_VB2_Generic_GJ" presynapticPopulation="DB4" postsynapticPopulation="VB2" synapse="neuron_to_neuron_elec_syn">
            <connectionWD id="0" preCellId="../DB4/0/generic_neuron_iaf_cell" postCellId="../VB2/0/generic_neuron_iaf_cell" weight="1.0" delay="0ms"/>
        </projection>
        <projection id="NC_DB4_VB4_Generic_GJ" presynapticPopulation="DB4" postsynapticPopulation="VB4" synapse="neuron_to_neuron_elec_syn">
            <connectionWD id="0" preCellId="../DB4/0/generic_neuron_iaf_cell" postCellId="../VB4/0/generic_neuron_iaf_cell" weight="1.0" delay="0ms"/>
        </projection>
        <projection id="NC_DB5_AVAR_Generic_GJ" presynapticPopulation="DB5" postsynapticPopulation="AVAR" synapse="neuron_to_neuron_elec_syn">
            <connectionWD id="0" preCellId="../DB5/0/generic_neuron_iaf_cell" postCellId="../AVAR/0/generic_neuron_iaf_cell" weight="2.0" delay="0ms"/>
        </projection>
        <projection id="NC_DD1_DD2_Generic_GJ" presynapticPopulation="DD1" postsynapticPopulation="DD2" synapse="neuron_to_neuron_elec_syn">
            <connectionWD id="0" preCellId="../DD1/0/generic_neuron_iaf_cell" postCellId="../DD2/0/generic_neuron_iaf_cell" weight="1.0" delay="0ms"/>
        </projection>
        <projection id="NC_DD1_VD1_Generic_GJ" presynapticPopulation="DD1" postsynapticPopulation="VD1" synapse="neuron_to_neuron_elec_syn">
            <connectionWD id="0" preCellId="../DD1/0/generic_neuron_iaf_cell" postCellId="../VD1/0/generic_neuron_iaf_cell" weight="4.0" delay="0ms"/>
        </projection>
        <projection id="NC_DD1_VD2_GABA" presynapticPopulation="DD1" postsynapticPopulation="VD2" synapse="neuron_to_neuron_inh_syn">
            <connectionWD id="0" preCellId="../DD1/0/generic_neuron_iaf_cell" postCellId="../VD2/0/generic_neuron_iaf_cell" weight="1.0" delay="0ms"/>
        </projection>
        <projection id="NC_DD1_VD2_Generic_GJ" presynapticPopulation="DD1" postsynapticPopulation="VD2" synapse="neuron_to_neuron_elec_syn">
            <connectionWD id="0" preCellId="../DD1/0/generic_neuron_iaf_cell" postCellId="../VD2/0/generic_neuron_iaf_cell" weight="2.0" delay="0ms"/>
        </projection>
        <projection id="NC_DD2_DD1_Generic_GJ" presynapticPopulation="DD2" postsynapticPopulation="DD1" synapse="neuron_to_neuron_elec_syn">
            <connectionWD id="0" preCellId="../DD2/0/generic_neuron_iaf_cell" postCellId="../DD1/0/generic_neuron_iaf_cell" weight="1.0" delay="0ms"/>
        </projection>
        <projection id="NC_DD2_DD3_Generic_GJ" presynapticPopulation="DD2" postsynapticPopulation="DD3" synapse="neuron_to_neuron_elec_syn">
            <connectionWD id="0" preCellId="../DD2/0/generic_neuron_iaf_cell" postCellId="../DD3/0/generic_neuron_iaf_cell" weight="2.0" delay="0ms"/>
        </projection>
        <projection id="NC_DD2_VD3_GABA" presynapticPopulation="DD2" postsynapticPopulation="VD3" synapse="neuron_to_neuron_inh_syn">
            <connectionWD id="0" preCellId="../DD2/0/generic_neuron_iaf_cell" postCellId="../VD3/0/generic_neuron_iaf_cell" weight="1.0" delay="0ms"/>
        </projection>
        <projection id="NC_DD2_VD4_GABA" presynapticPopulation="DD2" postsynapticPopulation="VD4" synapse="neuron_to_neuron_inh_syn">
            <connectionWD id="0" preCellId="../DD2/0/generic_neuron_iaf_cell" postCellId="../VD4/0/generic_neuron_iaf_cell" weight="1.0" delay="0ms"/>
        </projection>
        <projection id="NC_DD2_VD4_Generic_GJ" presynapticPopulation="DD2" postsynapticPopulation="VD4" synapse="neuron_to_neuron_elec_syn">
            <connectionWD id="0" preCellId="../DD2/0/generic_neuron_iaf_cell" postCellId="../VD4/0/generic_neuron_iaf_cell" weight="2.0" delay="0ms"/>
        </projection>
        <projection id="NC_DD3_DD2_Generic_GJ" presynapticPopulation="DD3" postsynapticPopulation="DD2" synapse="neuron_to_neuron_elec_syn">
            <connectionWD id="0" preCellId="../DD3/0/generic_neuron_iaf_cell" postCellId="../DD2/0/generic_neuron_iaf_cell" weight="2.0" delay="0ms"/>
        </projection>
        <projection id="NC_DD3_DD4_Generic_GJ" presynapticPopulation="DD3" postsynapticPopulation="DD4" synapse="neuron_to_neuron_elec_syn">
            <connectionWD id="0" preCellId="../DD3/0/generic_neuron_iaf_cell" postCellId="../DD4/0/generic_neuron_iaf_cell" weight="1.0" delay="0ms"/>
        </projection>
        <projection id="NC_DD4_DD3_Generic_GJ" presynapticPopulation="DD4" postsynapticPopulation="DD3" synapse="neuron_to_neuron_elec_syn">
            <connectionWD id="0" preCellId="../DD4/0/generic_neuron_iaf_cell" postCellId="../DD3/0/generic_neuron_iaf_cell" weight="1.0" delay="0ms"/>
        </projection>
        <projection id="NC_VD1_DD1_GABA" presynapticPopulation="VD1" postsynapticPopulation="DD1" synapse="neuron_to_neuron_inh_syn">
            <connectionWD id="0" preCellId="../VD1/0/generic_neuron_iaf_cell" postCellId="../DD1/0/generic_neuron_iaf_cell" weight="1.0" delay="0ms"/>
        </projection>
        <projection id="NC_VD1_DD1_Generic_GJ" presynapticPopulation="VD1" postsynapticPopulation="DD1" synapse="neuron_to_neuron_elec_syn">
            <connectionWD id="0" preCellId="../VD1/0/generic_neuron_iaf_cell" postCellId="../DD1/0/generic_neuron_iaf_cell" weight="4.0" delay="0ms"/>
        </projection>
        <projection id="NC_VD1_VD2_Generic_GJ" presynapticPopulation="VD1" postsynapticPopulation="VD2" synapse="neuron_to_neuron_elec_syn">
            <connectionWD id="0" preCellId="../VD1/0/generic_neuron_iaf_cell" postCellId="../VD2/0/generic_neuron_iaf_cell" weight="7.0" delay="0ms"/>
        </projection>
        <projection id="NC_VD2_DD1_GABA" presynapticPopulation="VD2" postsynapticPopulation="DD1" synapse="neuron_to_neuron_inh_syn">
            <connectionWD id="0" preCellId="../VD2/0/generic_neuron_iaf_cell" postCellId="../DD1/0/generic_neuron_iaf_cell" weight="1.0" delay="0ms"/>
        </projection>
        <projection id="NC_VD2_DD1_Generic_GJ" presynapticPopulation="VD2" postsynapticPopulation="DD1" synapse="neuron_to_neuron_elec_syn">
            <connectionWD id="0" preCellId="../VD2/0/generic_neuron_iaf_cell" postCellId="../DD1/0/generic_neuron_iaf_cell" weight="2.0" delay="0ms"/>
        </projection>
        <projection id="NC_VD2_VB2_GABA" presynapticPopulation="VD2" postsynapticPopulation="VB2" synapse="neuron_to_neuron_inh_syn">
            <connectionWD id="0" preCellId="../VD2/0/generic_neuron_iaf_cell" postCellId="../VB2/0/generic_neuron_iaf_cell" weight="3.0" delay="0ms"/>
        </projection>
        <projection id="NC_VD2_VD1_Generic_GJ" presynapticPopulation="VD2" postsynapticPopulation="VD1" synapse="neuron_to_neuron_elec_syn">
            <connectionWD id="0" preCellId="../VD2/0/generic_neuron_iaf_cell" postCellId="../VD1/0/generic_neuron_iaf_cell" weight="7.0" delay="0ms"/>
        </projection>
        <projection id="NC_VD2_VD3_Generic_GJ" presynapticPopulation="VD2" postsynapticPopulation="VD3" synapse="neuron_to_neuron_elec_syn">
            <connectionWD id="0" preCellId="../VD2/0/generic_neuron_iaf_cell" postCellId="../VD3/0/generic_neuron_iaf_cell" weight="2.0" delay="0ms"/>
        </projection>
        <projection id="NC_VD3_VB2_GABA" presynapticPopulation="VD3" postsynapticPopulation="VB2" synapse="neuron_to_neuron_inh_syn">
            <connectionWD id="0" preCellId="../VD3/0/generic_neuron_iaf_cell" postCellId="../VB2/0/generic_neuron_iaf_cell" weight="2.0" delay="0ms"/>
        </projection>
        <projection id="NC_VD3_VD2_Generic_GJ" presynapticPopulation="VD3" postsynapticPopulation="VD2" synapse="neuron_to_neuron_elec_syn">
            <connectionWD id="0" preCellId="../VD3/0/generic_neuron_iaf_cell" postCellId="../VD2/0/generic_neuron_iaf_cell" weight="2.0" delay="0ms"/>
        </projection>
        <projection id="NC_VD3_VD4_Generic_GJ" presynapticPopulation="VD3" postsynapticPopulation="VD4" synapse="neuron_to_neuron_elec_syn">
            <connectionWD id="0" preCellId="../VD3/0/generic_neuron_iaf_cell" postCellId="../VD4/0/generic_neuron_iaf_cell" weight="1.0" delay="0ms"/>
        </projection>
        <projection id="NC_VD4_DD2_Generic_GJ" presynapticPopulation="VD4" postsynapticPopulation="DD2" synapse="neuron_to_neuron_elec_syn">
            <connectionWD id="0" preCellId="../VD4/0/generic_neuron_iaf_cell" postCellId="../DD2/0/generic_neuron_iaf_cell" weight="2.0" delay="0ms"/>
        </projection>
        <projection id="NC_VD4_VD3_Generic_GJ" presynapticPopulation="VD4" postsynapticPopulation="VD3" synapse="neuron_to_neuron_elec_syn">
            <connectionWD id="0" preCellId="../VD4/0/generic_neuron_iaf_cell" postCellId="../VD3/0/generic_neuron_iaf_cell" weight="1.0" delay="0ms"/>
        </projection>
        <projection id="NC_VD4_VD5_Generic_GJ" presynapticPopulation="VD4" postsynapticPopulation="VD5" synapse="neuron_to_neuron_elec_syn">
            <connectionWD id="0" preCellId="../VD4/0/generic_neuron_iaf_cell" postCellId="../VD5/0/generic_neuron_iaf_cell" weight="1.0" delay="0ms"/>
        </projection>
        <projection id="NC_VD5_AVAR_GABA" presynapticPopulation="VD5" postsynapticPopulation="AVAR" synapse="neuron_to_neuron_inh_syn">
            <connectionWD id="0" preCellId="../VD5/0/generic_neuron_iaf_cell" postCellId="../AVAR/0/generic_neuron_iaf_cell" weight="1.0" delay="0ms"/>
        </projection>
        <projection id="NC_VD5_VB4_GABA" presynapticPopulation="VD5" postsynapticPopulation="VB4" synapse="neuron_to_neuron_inh_syn">
            <connectionWD id="0" preCellId="../VD5/0/generic_neuron_iaf_cell" postCellId="../VB4/0/generic_neuron_iaf_cell" weight="2.0" delay="0ms"/>
        </projection>
        <projection id="NC_VD5_VD4_Generic_GJ" presynapticPopulation="VD5" postsynapticPopulation="VD4" synapse="neuron_to_neuron_elec_syn">
            <connectionWD id="0" preCellId="../VD5/0/generic_neuron_iaf_cell" postCellId="../VD4/0/generic_neuron_iaf_cell" weight="1.0" delay="0ms"/>
        </projection>
        <projection id="NC_RIML_AIBR_Generic_GJ" presynapticPopulation="RIML" postsynapticPopulation="AIBR" synapse="neuron_to_neuron_elec_syn">
            <connectionWD id="0" preCellId="../RIML/0/generic_neuron_iaf_cell" postCellId="../AIBR/0/generic_neuron_iaf_cell" weight="1.0" delay="0ms"/>
        </projection>
        <projection id="NC_RIML_AVAL_Acetylcholine_Tyramine" presynapticPopulation="RIML" postsynapticPopulation="AVAL" synapse="neuron_to_neuron_exc_syn">
            <connectionWD id="0" preCellId="../RIML/0/generic_neuron_iaf_cell" postCellId="../AVAL/0/generic_neuron_iaf_cell" weight="1.0" delay="0ms"/>
        </projection>
        <projection id="NC_RIML_AVAR_Generic_GJ" presynapticPopulation="RIML" postsynapticPopulation="AVAR" synapse="neuron_to_neuron_elec_syn">
            <connectionWD id="0" preCellId="../RIML/0/generic_neuron_iaf_cell" postCellId="../AVAR/0/generic_neuron_iaf_cell" weight="2.0" delay="0ms"/>
        </projection>
        <projection id="NC_RIMR_AIBL_Generic_GJ" presynapticPopulation="RIMR" postsynapticPopulation="AIBL" synapse="neuron_to_neuron_elec_syn">
            <connectionWD id="0" preCellId="../RIMR/0/generic_neuron_iaf_cell" postCellId="../AIBL/0/generic_neuron_iaf_cell" weight="1.0" delay="0ms"/>
        </projection>
        <projection id="NC_RIMR_AIBL_Acetylcholine_Tyramine" presynapticPopulation="RIMR" postsynapticPopulation="AIBL" synapse="neuron_to_neuron_exc_syn">
            <connectionWD id="0" preCellId="../RIMR/0/generic_neuron_iaf_cell" postCellId="../AIBL/0/generic_neuron_iaf_cell" weight="4.0" delay="0ms"/>
        </projection>
        <projection id="NC_RIMR_AVAL_Acetylcholine_Tyramine" presynapticPopulation="RIMR" postsynapticPopulation="AVAL" synapse="neuron_to_neuron_exc_syn">
            <connectionWD id="0" preCellId="../RIMR/0/generic_neuron_iaf_cell" postCellId="../AVAL/0/generic_neuron_iaf_cell" weight="2.0" delay="0ms"/>
        </projection>
        <projection id="NC_RIMR_AVAL_Generic_GJ" presynapticPopulation="RIMR" postsynapticPopulation="AVAL" synapse="neuron_to_neuron_elec_syn">
            <connectionWD id="0" preCellId="../RIMR/0/generic_neuron_iaf_cell" postCellId="../AVAL/0/generic_neuron_iaf_cell" weight="3.0" delay="0ms"/>
        </projection>
        <projection id="NC_RIMR_AVAR_Generic_GJ" presynapticPopulation="RIMR" postsynapticPopulation="AVAR" synapse="neuron_to_neuron_elec_syn">
            <connectionWD id="0" preCellId="../RIMR/0/generic_neuron_iaf_cell" postCellId="../AVAR/0/generic_neuron_iaf_cell" weight="1.0" delay="0ms"/>
        </projection>
        <projection id="NC_VB1_AIBR_Acetylcholine" presynapticPopulation="VB1" postsynapticPopulation="AIBR" synapse="neuron_to_neuron_exc_syn">
            <connectionWD id="0" preCellId="../VB1/0/generic_neuron_iaf_cell" postCellId="../AIBR/0/generic_neuron_iaf_cell" weight="1.0" delay="0ms"/>
        </projection>
        <projection id="NC_VB1_DB2_Generic_GJ" presynapticPopulation="VB1" postsynapticPopulation="DB2" synapse="neuron_to_neuron_elec_syn">
            <connectionWD id="0" preCellId="../VB1/0/generic_neuron_iaf_cell" postCellId="../DB2/0/generic_neuron_iaf_cell" weight="2.0" delay="0ms"/>
        </projection>
        <projection id="NC_VB1_DD1_Acetylcholine" presynapticPopulation="VB1" postsynapticPopulation="DD1" synapse="neuron_to_neuron_exc_syn">
            <connectionWD id="0" preCellId="../VB1/0/generic_neuron_iaf_cell" postCellId="../DD1/0/generic_neuron_iaf_cell" weight="1.0" delay="0ms"/>
        </projection>
        <projection id="NC_VB1_RIML_Acetylcholine" presynapticPopulation="VB1" postsynapticPopulation="RIML" synapse="neuron_to_neuron_exc_syn">
            <connectionWD id="0" preCellId="../VB1/0/generic_neuron_iaf_cell" postCellId="../RIML/0/generic_neuron_iaf_cell" weight="2.0" delay="0ms"/>
        </projection>
        <projection id="NC_VB1_VB2_Generic_GJ" presynapticPopulation="VB1" postsynapticPopulation="VB2" synapse="neuron_to_neuron_elec_syn">
            <connectionWD id="0" preCellId="../VB1/0/generic_neuron_iaf_cell" postCellId="../VB2/0/generic_neuron_iaf_cell" weight="4.0" delay="0ms"/>
        </projection>
        <projection id="NC_VB1_VD1_Acetylcholine" presynapticPopulation="VB1" postsynapticPopulation="VD1" synapse="neuron_to_neuron_exc_syn">
            <connectionWD id="0" preCellId="../VB1/0/generic_neuron_iaf_cell" postCellId="../VD1/0/generic_neuron_iaf_cell" weight="3.0" delay="0ms"/>
        </projection>
        <projection id="NC_VB1_VD2_Acetylcholine" presynapticPopulation="VB1" postsynapticPopulation="VD2" synapse="neuron_to_neuron_exc_syn">
            <connectionWD id="0" preCellId="../VB1/0/generic_neuron_iaf_cell" postCellId="../VD2/0/generic_neuron_iaf_cell" weight="1.0" delay="0ms"/>
        </projection>
        <projection id="NC_VB2_DB4_Generic_GJ" presynapticPopulation="VB2" postsynapticPopulation="DB4" synapse="neuron_to_neuron_elec_syn">
            <connectionWD id="0" preCellId="../VB2/0/generic_neuron_iaf_cell" postCellId="../DB4/0/generic_neuron_iaf_cell" weight="1.0" delay="0ms"/>
        </projection>
        <projection id="NC_VB2_DD1_Acetylcholine" presynapticPopulation="VB2" postsynapticPopulation="DD1" synapse="neuron_to_neuron_exc_syn">
            <connectionWD id="0" preCellId="../VB2/0/generic_neuron_iaf_cell" postCellId="../DD1/0/generic_neuron_iaf_cell" weight="20.0" delay="0ms"/>
        </projection>
        <projection id="NC_VB2_DD2_Acetylcholine" presynapticPopulation="VB2" postsynapticPopulation="DD2" synapse="neuron_to_neuron_exc_syn">
            <connectionWD id="0" preCellId="../VB2/0/generic_neuron_iaf_cell" postCellId="../DD2/0/generic_neuron_iaf_cell" weight="1.0" delay="0ms"/>
        </projection>
        <projection id="NC_VB2_VB1_Generic_GJ" presynapticPopulation="VB2" postsynapticPopulation="VB1" synapse="neuron_to_neuron_elec_syn">
            <connectionWD id="0" preCellId="../VB2/0/generic_neuron_iaf_cell" postCellId="../VB1/0/generic_neuron_iaf_cell" weight="4.0" delay="0ms"/>
        </projection>
        <projection id="NC_VB2_VB3_Generic_GJ" presynapticPopulation="VB2" postsynapticPopulation="VB3" synapse="neuron_to_neuron_elec_syn">
            <connectionWD id="0" preCellId="../VB2/0/generic_neuron_iaf_cell" postCellId="../VB3/0/generic_neuron_iaf_cell" weight="1.0" delay="0ms"/>
        </projection>
        <projection id="NC_VB2_VB5_Generic_GJ" presynapticPopulation="VB2" postsynapticPopulation="VB5" synapse="neuron_to_neuron_elec_syn">
            <connectionWD id="0" preCellId="../VB2/0/generic_neuron_iaf_cell" postCellId="../VB5/0/generic_neuron_iaf_cell" weight="1.0" delay="0ms"/>
        </projection>
        <projection id="NC_VB2_VD2_Acetylcholine" presynapticPopulation="VB2" postsynapticPopulation="VD2" synapse="neuron_to_neuron_exc_syn">
            <connectionWD id="0" preCellId="../VB2/0/generic_neuron_iaf_cell" postCellId="../VD2/0/generic_neuron_iaf_cell" weight="9.0" delay="0ms"/>
        </projection>
        <projection id="NC_VB2_VD3_Acetylcholine" presynapticPopulation="VB2" postsynapticPopulation="VD3" synapse="neuron_to_neuron_exc_syn">
            <connectionWD id="0" preCellId="../VB2/0/generic_neuron_iaf_cell" postCellId="../VD3/0/generic_neuron_iaf_cell" weight="3.0" delay="0ms"/>
        </projection>
        <projection id="NC_VB3_DB1_Generic_GJ" presynapticPopulation="VB3" postsynapticPopulation="DB1" synapse="neuron_to_neuron_elec_syn">
            <connectionWD id="0" preCellId="../VB3/0/generic_neuron_iaf_cell" postCellId="../DB1/0/generic_neuron_iaf_cell" weight="1.0" delay="0ms"/>
        </projection>
        <projection id="NC_VB3_DD2_Acetylcholine" presynapticPopulation="VB3" postsynapticPopulation="DD2" synapse="neuron_to_neuron_exc_syn">
            <connectionWD id="0" preCellId="../VB3/0/generic_neuron_iaf_cell" postCellId="../DD2/0/generic_neuron_iaf_cell" weight="37.0" delay="0ms"/>
        </projection>
        <projection id="NC_VB3_VB2_Generic_GJ" presynapticPopulation="VB3" postsynapticPopulation="VB2" synapse="neuron_to_neuron_elec_syn">
            <connectionWD id="0" preCellId="../VB3/0/generic_neuron_iaf_cell" postCellId="../VB2/0/generic_neuron_iaf_cell" weight="1.0" delay="0ms"/>
        </projection>
        <projection id="NC_VB4_DB1_Generic_GJ" presynapticPopulation="VB4" postsynapticPopulation="DB1" synapse="neuron_to_neuron_elec_syn">
            <connectionWD id="0" preCellId="../VB4/0/generic_neuron_iaf_cell" postCellId="../DB1/0/generic_neuron_iaf_cell" weight="1.0" delay="0ms"/>
        </projection>
        <projection id="NC_VB4_DB4_Generic_GJ" presynapticPopulation="VB4" postsynapticPopulation="DB4" synapse="neuron_to_neuron_elec_syn">
            <connectionWD id="0" preCellId="../VB4/0/generic_neuron_iaf_cell" postCellId="../DB4/0/generic_neuron_iaf_cell" weight="1.0" delay="0ms"/>
        </projection>
        <projection id="NC_VB4_DD2_Acetylcholine" presynapticPopulation="VB4" postsynapticPopulation="DD2" synapse="neuron_to_neuron_exc_syn">
            <connectionWD id="0" preCellId="../VB4/0/generic_neuron_iaf_cell" postCellId="../DD2/0/generic_neuron_iaf_cell" weight="6.0" delay="0ms"/>
        </projection>
        <projection id="NC_VB4_DD3_Acetylcholine" presynapticPopulation="VB4" postsynapticPopulation="DD3" synapse="neuron_to_neuron_exc_syn">
            <connectionWD id="0" preCellId="../VB4/0/generic_neuron_iaf_cell" postCellId="../DD3/0/generic_neuron_iaf_cell" weight="16.0" delay="0ms"/>
        </projection>
        <projection id="NC_VB4_VB5_Generic_GJ" presynapticPopulation="VB4" postsynapticPopulation="VB5" synapse="neuron_to_neuron_elec_syn">
            <connectionWD id="0" preCellId="../VB4/0/generic_neuron_iaf_cell" postCellId="../VB5/0/generic_neuron_iaf_cell" weight="1.0" delay="0ms"/>
        </projection>
        <projection id="NC_VB5_DD3_Acetylcholine" presynapticPopulation="VB5" postsynapticPopulation="DD3" synapse="neuron_to_neuron_exc_syn">
            <connectionWD id="0" preCellId="../VB5/0/generic_neuron_iaf_cell" postCellId="../DD3/0/generic_neuron_iaf_cell" weight="27.0" delay="0ms"/>
        </projection>
        <projection id="NC_VB5_VB2_Generic_GJ" presynapticPopulation="VB5" postsynapticPopulation="VB2" synapse="neuron_to_neuron_elec_syn">
            <connectionWD id="0" preCellId="../VB5/0/generic_neuron_iaf_cell" postCellId="../VB2/0/generic_neuron_iaf_cell" weight="1.0" delay="0ms"/>
        </projection>
        <projection id="NC_VB5_VB4_Generic_GJ" presynapticPopulation="VB5" postsynapticPopulation="VB4" synapse="neuron_to_neuron_elec_syn">
            <connectionWD id="0" preCellId="../VB5/0/generic_neuron_iaf_cell" postCellId="../VB4/0/generic_neuron_iaf_cell" weight="1.0" delay="0ms"/>
        </projection>
        <inputList id="Input_ASHL_stim_ASHL_1" population="ASHL" component="stim_ASHL_1">
            <input id="0" target="../ASHL/0/generic_neuron_iaf_cell" destination="synapses"/>
        </inputList>
        <inputList id="Input_ASHR_stim_ASHR_1" population="ASHR" component="stim_ASHR_1">
            <input id="0" target="../ASHR/0/generic_neuron_iaf_cell" destination="synapses"/>
        </inputList>
        <inputList id="Input_AWCL_stim_AWCL_1" population="AWCL" component="stim_AWCL_1">
            <input id="0" target="../AWCL/0/generic_neuron_iaf_cell" destination="synapses"/>
        </inputList>
        <inputList id="Input_AWCR_stim_AWCR_1" population="AWCR" component="stim_AWCR_1">
            <input id="0" target="../AWCR/0/generic_neuron_iaf_cell" destination="synapses"/>
        </inputList>
        <inputList id="Input_AIBL_stim_AIBL_1" population="AIBL" component="stim_AIBL_1">
            <input id="0" target="../AIBL/0/generic_neuron_iaf_cell" destination="synapses"/>
        </inputList>
        <inputList id="Input_AIBR_stim_AIBR_1" population="AIBR" component="stim_AIBR_1">
            <input id="0" target="../AIBR/0/generic_neuron_iaf_cell" destination="synapses"/>
        </inputList>
        <inputList id="Input_RIML_stim_RIML_1" population="RIML" component="stim_RIML_1">
            <input id="0" target="../RIML/0/generic_neuron_iaf_cell" destination="synapses"/>
        </inputList>
        <inputList id="Input_RIMR_stim_RIMR_1" population="RIMR" component="stim_RIMR_1">
            <input id="0" target="../RIMR/0/generic_neuron_iaf_cell" destination="synapses"/>
        </inputList>
        <inputList id="Input_AVAL_stim_AVAL_1" population="AVAL" component="stim_AVAL_1">
            <input id="0" target="../AVAL/0/generic_neuron_iaf_cell" destination="synapses"/>
        </inputList>
        <inputList id="Input_AVAR_stim_AVAR_1" population="AVAR" component="stim_AVAR_1">
            <input id="0" target="../AVAR/0/generic_neuron_iaf_cell" destination="synapses"/>
        </inputList>
    </network>
</neuroml>
